*Heading
** Job name: Job-4 Model name: Adhesion-1
*Preprint, echo=NO, model=NO, history=NO, contact=NO
** PARTS
*Part, name=BottomBlock
*Node
    1,          0.00000,          0.00000,         -0.01626
    2,          0.12903,          0.00000,         -0.03365
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*Element, type=C3D8RH
    1,  7939,  7940,  8003,  8002,  3970,  3971,  4034,  4033
    2,  8002,  8003,  8066,  8065,  4033,  4034,  4097,  4096
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*Nset, nset=BotMesh, internal, generate
    1, 11907,    1
    1,     1,    1
*Elset, elset=BotMesh, internal, generate
    1,  7688,    1
    1,     1,    1
** Section: BottomSection
*Solid Section, elset=BotMesh, material="Soft Surface"
,
*End Part
** ASSEMBLY
*Assembly, name=Assembly
*Instance, name=BottomBlock-1, part=BottomBlock
*End Instance
**
*Nset, nset=nodeFixedBot, internal, instance=BottomBlock-1
  7939,  7940,  7941,  7942,  7943,  7944
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*Nset, nset=nodeXsymmBot, internal, instance=BottomBlock-1
     1,    64,   127,   190,   253,   316
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*Nset, nset=nodeYsymmBot, internal, instance=BottomBlock-1
     1,     2,     3,     4,     5,     6
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*Nset, nset=contactNodeBot, internal, instance=BottomBlock-1
     1,     2,     3,     4,     5,     6
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*Surface, type=NODE, name=contactNodeBot, internal
contactNodeBot, 1.0
*Elset, elset=BottomContactSurf, internal, instance=BottomBlock-1
  3845,  3846,  3847,  3848,  3849,  3850
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*Surface, type=ELEMENT, name=BottomContactSurf
BottomContactSurf, S2
*End Assembly
** MATERIALS
*Material, name="Soft Surface"
*Density
 1.00
*Elastic
 1.00, 0.49
*Material, name="Elastomer"
*Density
 1.00
*Elastic
 0.10, 0.49
**INTERACTION PROPERTIES
*Surface Interaction, name=Contact-1
1.,
*Surface Behavior, pressure-overclosure=HARD
**INTERACTIONS
*Contact Pair, interaction=Contact-1, type=SURFACE TO SURFACE
BottomContactSurf, BottomContactSurf
** STEP: Step-1
*Step, name=Step-1, nlgeom=YES
push contact
*Static
1., 1., 1e-05, 1.
** BOUNDARY CONDITIONS
** Name: BC-1 Type: Displacement/Rotation
*Boundary
NodeFixedBot, 3, 3, 0.0
NodeXSymmBot, 1, 1, 0.0
NodeYSymmBot, 2, 2, 0.0
** OUTPUT REQUESTS
*Restart, write, frequency=0
*Output, field, variable=PRESELECT
*Output, history, variable=PRESELECT
*End Step
