*Heading
** Job name: AdhesionTest6-1 Model name: AdhesionTest6
** Generated by: Abaqus/CAE 6.9-EF1
*Preprint, echo=NO, model=NO, history=NO, contact=NO
**
** PARTS
**
*Part, name=Mushroom
*Node
      1,        -1.25,        1.296,        -1.25
      2,        -1.25,        1.296,  -1.04166663
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*Element, type=C3D8R
   1,   117,   113,   112,   118,  8433,   121,   122,  8464
   2,  1079,  1077,  1076,  1078,  8425,  1081,  1082,  8423
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*Element, type=C3D6
5671,  4043,  4044,  8336,  4047,  4048, 12380
5672,  4043,  8336,  8342,  4047, 12380, 12386
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*Elset, elset=_PickedSet2, internal, generate
     1,  29880,      1
** Section: Mushroom
*Solid Section, elset=_PickedSet2, material=Silicone
,
*End Part
**
**
** ASSEMBLY
**
*Assembly, name=Assembly
**
*Instance, name=Mushroom-1, part=Mushroom
          0.,           0.,           0.
          0.,           0.,           0., 1.00000001268805,           0.,           0., 89.9999992730282
*End Instance
**
*Nset, nset=TopSurf, instance=Mushroom-1
  655,  659,  660,  661,  662,  663
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*Nset, nset=BotSurf, instance=Mushroom-1
  941,  946,  950,  953,  957,  958
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*Nset, nset=BotEdge, instance=Mushroom-1
  941,  946,  950,  953,  957,  958
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*Nset, nset=SymmEdge, instance=Mushroom-1
 3554,
*Nset, nset=SymmSide, instance=Mushroom-1
 3378, 3380, 3381, 3394, 3395, 3396, 3397, 3398, 3412, 3413, 3414, 3426, 3427, 3530, 3590, 3694
*End Assembly
**
** MATERIALS
**
*Material, name=Silicone
*Density
 0.001,
*Elastic
 1e+07, 0.49
** ----------------------------------------------------------------
**
** STEP: Step-1
**
*Step, name=Step-1, nlgeom=YES
*Static, riks
1., 1., 1e-05, , ,
**
** BOUNDARY CONDITIONS
**
** Name: BotSymm Type: Displacement/Rotation
*Boundary
SymmSide, 1, 1
** Name: FixedBot Type: Displacement/Rotation
*Boundary
BotEdge, 3, 3
** Name: FixedPt Type: Displacement/Rotation
*Boundary
SymmEdge, 1, 1
SymmEdge, 2, 2
** Name: TopDisp Type: Displacement/Rotation
*Boundary
TopSurf, 3, 3, -0.5
**
** OUTPUT REQUESTS
**
*Restart, write, frequency=0
**
** FIELD OUTPUT: F-Output-1
**
*Output, field, variable=PRESELECT
**
** HISTORY OUTPUT: H-Output-1
**
*Output, history, variable=PRESELECT
*End Step
