*Heading
** Job name: SingleSurfJob-1 Model name: AdhesionSingleSurf
** Generated by: Abaqus/CAE 6.9-EF1
*Preprint, echo=NO, model=NO, history=NO, contact=NO
**
** PARTS
**
*Part, name=BOTTOMBLOCK
*Node
      1,           0.,           0.,  -2.17218995
      2,   1.20000005,           0.,  -2.39805007
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*Element, type=C3D8RH
   1, 1923, 1924, 1955, 1954,  962,  963,  994,  993
   2, 1954, 1955, 1986, 1985,  993,  994, 1025, 1024
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*Nset, nset=BOTMESH, generate
    1,  2883,     1
*Elset, elset=BOTMESH, generate
    1,  1800,     1
** Section: Section-1-BOTMESH
*Solid Section, elset=BOTMESH, material="SOFT SURFACE"
,
*End Part
**
*Part, name=BanerjeeTestPart
*Node
      1,  -1.60246778,           0.,   3.08938265
      2,   1.60246778,           0.,   3.08938265
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*Element, type=C3D8H
  1,  244,   19,    2,   18, 1829,  251,   24,  296
  2,   21,  237,  243,   22,  253, 1822, 1828,  254
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*Nset, nset=_PickedSet10, internal, generate
    1,  3365,     1
*Elset, elset=_PickedSet10, internal, generate
    1,  2570,     1
** Section: Section-Cup
*Solid Section, elset=_PickedSet10, material=ELASTOMER
,
*End Part
**
**
** ASSEMBLY
**
*Assembly, name=Assembly
**
*Instance, name=BOTTOMBLOCK-1, part=BOTTOMBLOCK
*End Instance
**
*Instance, name=BanerjeeTestPart-1, part=BanerjeeTestPart
   19.205771,    16.799999,     6.829124
   19.205771,    16.799999,     6.829124,    19.205771,    17.799999,     6.829124,         180.
*End Instance
**
*Nset, nset=_PickedSet14, internal, instance=BanerjeeTestPart-1
    3,    4,   33,   34,   35,   36
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*Elset, elset=_PickedSet14, internal, instance=BanerjeeTestPart-1
  199,  200,  201,  202,  203,  204
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*Nset, nset=_PickedSet15, internal, instance=BanerjeeTestPart-1
  3,  4, 33, 34, 35, 36, 37
*Elset, elset=_PickedSet15, internal, instance=BanerjeeTestPart-1
  199,  200,  211,  214,  218,  219, 1612, 1619, 1621, 1624, 1627, 1628
*Nset, nset=_PickedSet41, internal, instance=BanerjeeTestPart-1
    3,    4,   33,   34,   35,   36
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*Elset, elset=_PickedSet41, internal, instance=BanerjeeTestPart-1
  199,  200,  201,  202,  203,  204
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*Nset, nset=NODEFIXEDBOT, instance=BOTTOMBLOCK-1, generate
 1923,  2883,     1
*Nset, nset=NODEXSYMMBOT, instance=BOTTOMBLOCK-1, generate
    1,  2853,    31
*Nset, nset=NODEYSYMMBOT, instance=BOTTOMBLOCK-1
    1,    2,    3,    4,    5,    6
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*Elset, elset=BOTTOMCONTACTSURF, instance=BOTTOMBLOCK-1, generate
  901,  1800,     1
*Nset, nset=CONTACTNODEBOT, instance=BOTTOMBLOCK-1, generate
   1,  961,    1
*Elset, elset=_TopContactSurface_S2, internal, instance=BanerjeeTestPart-1
  968,  969,  970,  971,  972,  973
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*Elset, elset=_TopContactSurface_S3, internal, instance=BanerjeeTestPart-1, generate
 1217,  1437,     4
*Elset, elset=_TopContactSurface_S4, internal, instance=BanerjeeTestPart-1, generate
 1217,  1437,     4
*Elset, elset=_TopContactSurface_S5, internal, instance=BanerjeeTestPart-1, generate
 1218,  1438,     4
*Elset, elset=_TopContactSurface_S6, internal, instance=BanerjeeTestPart-1
 1218, 1219, 1220, 1222, 1223, 1224
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*Surface, type=ELEMENT, name=TopContactSurface
_TopContactSurface_S2, S2
_TopContactSurface_S3, S3
_TopContactSurface_S4, S4
_TopContactSurface_S6, S6
_TopContactSurface_S5, S5
*Elset, elset=__PickedSurf28_S2, internal, instance=BanerjeeTestPart-1
  199,  200,  201,  202,  203,  204
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*Surface, type=ELEMENT, name=_PickedSurf28, internal
__PickedSurf28_S2, S2
*Elset, elset=_BOTTOMCONTACTSURF_S2, internal, instance=BOTTOMBLOCK-1, generate
  901,  1800,     1
*Surface, type=ELEMENT, name=BOTTOMCONTACTSURF
_BOTTOMCONTACTSURF_S2, S2
*Elset, elset=__ContactCupSurf_ssm_3_S3, internal, instance=BanerjeeTestPart-1, generate
 1217,  1325,     4
*Elset, elset=__ContactCupSurf_ssm_3_S4, internal, instance=BanerjeeTestPart-1, generate
 1217,  1325,     4
*Elset, elset=__ContactCupSurf_ssm_3_S5, internal, instance=BanerjeeTestPart-1, generate
 1218,  1326,     4
*Elset, elset=__ContactCupSurf_ssm_3_S6, internal, instance=BanerjeeTestPart-1
 1218, 1219, 1220, 1222, 1223, 1224
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*Surface, type=ELEMENT, name=_ContactCupSurf_ssm_3, internal
__ContactCupSurf_ssm_3_S3, S3
__ContactCupSurf_ssm_3_S4, S4
__ContactCupSurf_ssm_3_S6, S6
__ContactCupSurf_ssm_3_S5, S5
*Elset, elset=__ContactCupSurf_ssm_4_S3, internal, instance=BanerjeeTestPart-1, generate
 1329,  1437,     4
*Elset, elset=__ContactCupSurf_ssm_4_S4, internal, instance=BanerjeeTestPart-1, generate
 1329,  1437,     4
*Elset, elset=__ContactCupSurf_ssm_4_S5, internal, instance=BanerjeeTestPart-1, generate
 1330,  1438,     4
*Elset, elset=__ContactCupSurf_ssm_4_S6, internal, instance=BanerjeeTestPart-1
 1330, 1331, 1332, 1334, 1335, 1336
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*Surface, type=ELEMENT, name=_ContactCupSurf_ssm_4, internal
__ContactCupSurf_ssm_4_S3, S3
__ContactCupSurf_ssm_4_S4, S4
__ContactCupSurf_ssm_4_S6, S6
__ContactCupSurf_ssm_4_S5, S5
*End Assembly
**
** MATERIALS
**
*Material, name=ELASTOMER
*Density
1.,
*Hyperelastic, yeoh
 12.02,   -0.57,   0.044, 9.2e-10, 9.2e-10, 9.2e-10
**  MATERIALS
*Material, name="SOFT SURFACE"
*Density
1.,
*Hyperelastic, neo hooke
2290., 9.2e-10
**
** INTERACTION PROPERTIES
**
*Surface Interaction, name=CONTACT-1
1.,
*Friction
0.,
*Surface Behavior, pressure-overclosure=HARD
*Surface Smoothing, name=ContactCupSurf
_ContactCupSurf_ssm_3, , CIRCUMFERENTIAL, 19.2058, 16.8, -1.1888, 19.2058, 16.8, -0.1888
_ContactCupSurf_ssm_4, , CIRCUMFERENTIAL, 19.2058, 16.8, -1.1888, 19.2058, 16.8, -0.1888
**
** INTERACTIONS
**
** Interaction: ContactCupSurf
*Contact Pair, interaction=CONTACT-1, type=SURFACE TO SURFACE, adjust=0.0, geometric correction=ContactCupSurf
TopContactSurface, BOTTOMCONTACTSURF
** ----------------------------------------------------------------
**
** STEP: Step-1
**
*Step, name=Step-1, nlgeom=YES, inc=2000
push contact
*Static
0.01, 2., 1e-09, 0.05
**
** BOUNDARY CONDITIONS
**
** Name: BC-4 Type: Displacement/Rotation
*Boundary
_PickedSet14, 3, 3, -2.5
** Name: BC-5 Type: Displacement/Rotation
*Boundary
_PickedSet15, 1, 1
_PickedSet15, 2, 2
** Name: Disp-BC-1 Type: Displacement/Rotation
*Boundary
NODEFIXEDBOT, 3, 3
** Name: Disp-BC-2 Type: Displacement/Rotation
*Boundary
NODEXSYMMBOT, 1, 1
** Name: Disp-BC-3 Type: Displacement/Rotation
*Boundary
NODEYSYMMBOT, 2, 2
**
** INTERACTIONS
**
** Contact Controls for Interaction: ContactCupSurf
*Contact Controls, master=BOTTOMCONTACTSURF, slave=TopContactSurface, reset
*Contact Controls, master=BOTTOMCONTACTSURF, slave=TopContactSurface, Lagrange multiplier=YES, automaticTolerances, stabilize=0.1,
tangent fraction=0.1
**
** OUTPUT REQUESTS
**
*Restart, write, frequency=0
**
** FIELD OUTPUT: F-Output-1
**
*Output, field, variable=PRESELECT
**
** HISTORY OUTPUT: H-Output-1
**
*Output, history, variable=PRESELECT
*End Step
